*Heading
** Job name: SquarePlateWithHole3D Model name: Model-1
** Generated by: Abaqus/CAE 6.13-1
*Preprint, echo=NO, model=NO, history=NO, contact=NO
**
** PARTS
**
*Part, name=Part-1
*Node
      1,  0.100000001,  0.100000001, 0.00999999978
      2,  0.100000001,  0.100000001, 0.0199999996
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*Element, type=DC3D8
   1,   80,  538, 1238,  378,    1,   34,  362,   51
   2,  538,  100,  458, 1238,   34,    2,   35,  362
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*Nset, nset=Set-1, generate
    1,  1685,     1
*Elset, elset=Set-1, generate
    1,  1188,     1
** Section: Section-1
*Solid Section, elset=Set-1, material=Material-1
,
*End Part
**
**
** ASSEMBLY
**
*Assembly, name=Assembly
**
*Instance, name=Part-1-1, part=Part-1
*End Instance
**
*Nset, nset=Set-1, instance=Part-1-1
   23,   24,   25,   26,   27,   28
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*Elset, elset=Set-1, instance=Part-1-1
  955,  956,  957,  958,  959,  960
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*Elset, elset=_Surf-1_S4, internal, instance=Part-1-1, generate
   2,  198,    2
*Elset, elset=_Surf-1_S3, internal, instance=Part-1-1
 199, 200, 201, 202, 203, 204
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*Elset, elset=_Surf-1_S2, internal, instance=Part-1-1
 793, 794, 795, 796, 797, 798
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*Surface, type=ELEMENT, name=Surf-1
_Surf-1_S4, S4
_Surf-1_S3, S3
_Surf-1_S2, S2
*End Assembly
**
** MATERIALS
**
*Material, name=Material-1
*Conductivity
15.,
*Density
7800.,
*Specific Heat
125.,
**
** PHYSICAL CONSTANTS
**
*Physical Constants, absolute zero=-273.15, stefan boltzmann=5.669e-08
**
** PREDEFINED FIELDS
**
** Name: Predefined Field-1   Type: Temperature
*Initial Conditions, type=TEMPERATURE
Part-1-1.Set-1, 50.
** ----------------------------------------------------------------
**
** STEP: Step-1
**
*Step, name=Step-1, nlgeom=NO, inc=1000
*Heat Transfer, end=PERIOD
0.1, 50., , ,
**
** BOUNDARY CONDITIONS
**
** Name: BC-1 Type: Temperature
*Boundary
Set-1, 11, 11, 200.
**
** INTERACTIONS
**
** Interaction: Int-1
*Sfilm
Surf-1, F, 100., 200.
**
** OUTPUT REQUESTS
**
*Restart, write, frequency=0
**
** FIELD OUTPUT: F-Output-1
**
*ELEMENT OPERATOR OUTPUT, ASSEMBLE, STIFFNESS
*End Step
